// SBML level 2 version 4

model MODEL1308080006()
  // Cao2013 - Application of ABSIS method in the reversible isomerization model

  // Compartments:
  compartment dendrite = 1;
  compartment spine = 1;
  compartment PSD = 1;

  // Species:
  species $AMPAR in dendrite = 9/dendrite;
  species $PKA in spine = 1/spine;
  species Anchor in PSD = 167/PSD;
  species PP1 in PSD = 2/PSD;
  species MR in PSD = 0;
  species MR1 in PSD = 0;
  species MR2 in PSD = 0;
  species C5 in PSD = 0;
  species C6 in PSD = 0;
  species IR in spine = 0;
  species IR2 in spine = 0;

  // Parameters:
  k1f = 0.0002;
  k1b = 0.008;
  k2 = 0.0008;
  k3f = 0.018;
  k18 = 0.29167;
  k19 = 1.4;
  k20 = 0.35;
  k21 = 0.29167;
  k22 = 1.4;
  k23 = 0.35;
  p1 = 0.02963;
  p2 = 0.02963;
  p3 = 0.02963;
  K1 = 0.000675;
  K2 = 0.0013;
  alpha = 0.0000001458;
  beta = 0.0000024375;

  // Reactions:
  R_01_02: Anchor + IR2 -> MR2; k1f*Anchor*IR2 - k1b*MR2;
  R_03: MR => Anchor + IR; k2*MR;
  R_04: => IR; k3f*AMPAR;  // modifiers: AMPAR
  R_10: MR => MR1; p1*PKA*MR;  // modifiers: PKA
  R_16: MR1 => MR2; p2*PKA*MR1;  // modifiers: PKA
  R_19: IR => IR2; p3*PKA*IR*((PKA^2 + K1*PKA + (-alpha))/(PKA^2 + K2*PKA + beta));  // modifiers: PKA
  R_20_21: MR1 + PP1 -> C5; k18*MR1*PP1 - k19*C5;
  R_22: C5 => MR + PP1; k20*C5;
  R_23_24: MR2 + PP1 -> C6; k21*MR2*PP1 - k22*C6;
  R_25: C6 => MR1 + PP1; k23*C6;

  // Unit definitions:
  unit vol_secINV = litre / second;
  unit vol_uMINVsecINV = litre^2 / (1e-6 mole * second);
  unit substance = 1e-6 mole;
end
