// SBML level 2 version 4

model MODEL1308080006()
  // Cao2013 - Application of ABSIS method in the reversible isomerization model

  // Compartments:
  compartment dendrite = 1;
  compartment spine = 1;
  compartment PSD = 1;

  // Species:
  species $AMPAR in dendrite = 9/dendrite;
  species Anchor in PSD = 0;
  species PP1 in PSD = 0;
  species MR in PSD = 0;
  species MR1 in PSD = 0;
  species MR2 in PSD = 0;
  species C5 in PSD = 2/PSD;
  species C6 in PSD = 0;
  species $PKA in spine = 1/spine;
  species IR in spine = 0;
  species IR1 in spine = 0;
  species IR2 in spine = 0;
  species C1 in spine = 0;
  species C2 in spine = 0;
  species C3 in spine = 165/spine;
  species C4 in spine = 0;

  // Parameters:
  k1f = 0.0002;
  k1b = 0.008;
  k2 = 0.0008;
  k3f = 0.018;
  k3b = 1;
  k4 = 0.00002;
  k5 = 0.00002;
  k6 = 0.14815;
  k7 = 24;
  k8 = 6;
  k9 = 0.14815;
  k10 = 24;
  k11 = 6;
  k12 = 0.14815;
  k13 = 24;
  k14 = 6;
  k15 = 0.14815;
  k16 = 24;
  k17 = 6;
  k18 = 0.29167;
  k19 = 1.4;
  k20 = 0.35;
  k21 = 0.29167;
  k22 = 1.4;
  k23 = 0.35;

  // Reactions:
  R_01_02: Anchor + IR2 -> MR2; k1f*Anchor*IR2 - k1b*MR2;
  R_03: MR => Anchor + IR; k2*MR;
  R_04_05: -> IR; k3f*AMPAR - k3b*IR;  // modifiers: AMPAR
  R_06: IR2 => ; k4*IR2;
  R_07: IR1 => ; k5*IR1;
  R_08_09: MR -> C1; k6*PKA*MR - k7*C1;  // modifiers: PKA
  R_10: C1 => MR1; k8*C1;
  R_11_12: IR -> C2; k9*PKA*IR - k10*C2;  // modifiers: PKA
  R_13: C2 => IR1; k11*C2;
  R_14_15: MR1 -> C3; k12*PKA*MR1 - k13*C3;  // modifiers: PKA
  R_16: C3 => MR2; k14*C3;
  R_17_18: IR1 -> C4; k15*PKA*IR1 - k16*C4;  // modifiers: PKA
  R_19: C4 => IR2; k17*C4;
  R_20_21: MR1 + PP1 -> C5; k18*MR1*PP1 - k19*C5;
  R_22: C5 => MR + PP1; k20*C5;
  R_23_24: MR2 + PP1 -> C6; k21*MR2*PP1 - k22*C6;
  R_25: C6 => MR1 + PP1; k23*C6;

  // Unit definitions:
  unit vol_secINV = litre / second;
  unit vol_uMINVsecINV = litre^2 / (1e-6 mole * second);
  unit substance = 1e-6 mole;
end
